*Heading
 10more history output
** Job name: 10xoutput Model name: Job-2
** Generated by: Abaqus/CAE 2024
*Preprint, echo=NO, model=NO, history=NO, contact=NO
**
** PARTS
**
*Part, name=H5-1
*End Part
**
*Part, name=QUARTER-BATTERY
*Node
      1,           0.,        26.75,   5.07000017
      2,   23.2999992,        26.75,   5.07000017
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*Element, type=C3D8R
    1,   160,  1214,  4586,  1018,     1,    19,   514,    82
    2,  1214,  1215,  4587,  4586,    19,    20,   515,   514
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*Nset, nset=XZ_CUT
    3,    4,    6,    7,   17,   18
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*Elset, elset=XZ_CUT
   267,   268,   269,   270,   271,   272
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*Nset, nset=ZY_CUT
    9,   10,   11,   12,   17,   18
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*Elset, elset=ZY_CUT
 2281, 2282, 2283, 2284, 2285, 2286
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*Nset, nset=SET-8, generate
     1,  13545,      1
*Elset, elset=SET-8, generate
     1,  11424,      1
*Nset, nset=CONTACT
    5,    6,    9,   17,  101,  102
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*Elset, elset=CONTACT, generate
  9632,  11424,      8
*Elset, elset=CONTACTELEMENTS, generate
  9625,  11417,      8
*Nset, nset=CONTACTNODES
    2,    3,   10,   18,   37,   38
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*Elset, elset=_TOP_S2, internal, generate
   1,  285,    1
*Elset, elset=_TOP_S4, internal, generate
 2288,  9624,     8
*Elset, elset=_TOP_S6, internal, generate
  9625,  11417,      8
*Elset, elset="_cutoff sides (symmetry)_S2", internal
 2281, 2282, 2283, 2284, 2285, 2286
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*Elset, elset="_cutoff sides (symmetry)_S5", internal
   267,   268,   269,   270,   271,   272
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*Elset, elset="_Edges (open)_S6", internal, generate
    1,  2262,    19
*Elset, elset="_Edges (open)_S5", internal
 2489, 2490, 2491, 2492, 2493, 2494
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*Elset, elset="_Edges (open)_S2", internal, generate
 5521,  5672,     1
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*Elset, elset=_TOP_S2_1, internal, generate
   1,  285,    1
*Elset, elset=_TOP_S4_1, internal, generate
 2288,  9624,     8
*Elset, elset=_TOP_S6_1, internal, generate
  9625,  11417,      8
*Surface, type=ELEMENT, name=TOP
_TOP_S2_1, S2
_TOP_S4_1, S4
_TOP_S6_1, S6
*Elset, elset="_cutoff sides (symmetry)_S2", internal
 2281, 2282, 2283, 2284, 2285, 2286
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*Elset, elset="_cutoff sides (symmetry)_S5", internal
   267,   268,   269,   270,   271,   272
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*Surface, type=ELEMENT, name="cutoff sides (symmetry)"
"_cutoff sides (symmetry)_S2", S2
"_cutoff sides (symmetry)_S5", S5
*Elset, elset="_Edges (open)_S6", internal, generate
    1,  2262,    19
*Elset, elset="_Edges (open)_S5", internal
 2489, 2490, 2491, 2492, 2493, 2494
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*Elset, elset="_Edges (open)_S2", internal, generate
 5521,  5672,     1
*Surface, type=ELEMENT, name="Edges (open)"
"_Edges (open)_S6", S6
"_Edges (open)_S5", S5
"_Edges (open)_S2", S2
*Elset, elset=_BOTTOM_S6_1, internal, generate
 2281,  9617,     8
*Elset, elset=_BOTTOM_S4_1, internal, generate
  9632,  11424,      8
*Elset, elset=_BOTTOM_S1_1, internal, generate
 1996,  2280,     1
*Surface, type=ELEMENT, name=BOTTOM
_BOTTOM_S6_1, S6
_BOTTOM_S4_1, S4
_BOTTOM_S1_1, S1
** Section: Section-1-SET-8
*Solid Section, elset=SET-8, material=BATTERY
,
*End Part
**
*Part, name=TABLE-1
*End Part
**
**
** ASSEMBLY
**
*Assembly, name=Assembly
**
*Instance, name=QUARTER-BATTERY-1, part=QUARTER-BATTERY
*End Instance
**
*Instance, name=H5-1, part=H5-1
        29.3,        32.75,        10.17
        29.3,        32.75,        10.17, 30.3000000126881,        32.75,        10.17, 89.9999992730282
*Node
      1, -9.18485047e-16,          -5.,           0.
*Nset, nset=H5-1-RefPt_, internal
 1,
*Nset, nset=H5-1-REFPT_, internal
 1,
*Nset, nset=INDENTER
 1,
*Surface, type=REVOLUTION, name=H5-1-INDENTER
START,           5.,           0.
 CIRCL,           0.,          -5.,           0.,           0.
*End Instance
**
*Instance, name=TABLE-1, part=TABLE-1
-6.61584808675157e-15,           0., 6.61584817069379e-15
-6.61584808675157e-15,           0., 6.61584817069379e-15, -6.61584808675157e-15, -1.00000001268805, 6.61584817069379e-15, 89.9999992730282
*Node
      1,           0.,         67.5,           0.
*Nset, nset=TABLE-1-RefPt_, internal
 1,
*Nset, nset=TABLE-1-REFPT_, internal
 1,
*Nset, nset=TABLE
 1,
*Surface, type=CYLINDER, name=TABLE-1-TABLETOP
START,           0.,         67.5
 LINE,           0.,        -32.5
*End Instance
**
*Nset, nset=BOTTOM, instance=QUARTER-BATTERY-1
    5,    6,    7,    8,    9,   12
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*Elset, elset=BOTTOM, instance=QUARTER-BATTERY-1
  1996,  1997,  1998,  1999,  2000,  2001
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** Constraint: RigidBody-1
*Rigid Body, ref node=H5-1.INDENTER, analytical surface=H5-1.H5-1-INDENTER
** Constraint: RigidBody-2
*Rigid Body, ref node=TABLE-1.TABLE, analytical surface=TABLE-1.TABLE-1-TABLETOP
*End Assembly
*Amplitude, name=EQUALLY_SPACED, time=TOTAL TIME, definition=EQUALLY SPACED, fixed interval=250.
             0.,              1.
*Amplitude, name=SMOOTH_STEP, time=TOTAL TIME, definition=SMOOTH STEP
             0.,              0.,            250.,              1.
**
** MATERIALS
**
**  Initial plastic behavior is for copper, to be determined
**
**
*Material, name=BATTERY
*Density
 5.83e-09,
*Elastic
4200., 0.1
*Plastic
100.,  0.
120., 0.1
200., 0.2
250., 0.3
270., 0.4
290., 0.5
300., 0.6
**
** INTERACTION PROPERTIES
**
*Surface Interaction, name=INTPROP-1
*Friction
 0.1,
*Surface Behavior, pressure-overclosure=HARD
**
** BOUNDARY CONDITIONS
**
** Name: Disp-BC-1 Type: Displacement/Rotation
*Boundary
H5-1.INDENTER, 1, 1
** Name: Disp-BC-2 Type: Displacement/Rotation
*Boundary
H5-1.INDENTER, 2, 2
** Name: Disp-BC-3 Type: Displacement/Rotation
*Boundary
H5-1.INDENTER, 4, 4
** Name: Disp-BC-4 Type: Displacement/Rotation
*Boundary
H5-1.INDENTER, 5, 5
** Name: Disp-BC-5 Type: Displacement/Rotation
*Boundary
H5-1.INDENTER, 6, 6
** Name: Disp-BC-6 Type: Symmetry/Antisymmetry/Encastre
*Boundary
QUARTER-BATTERY-1.XZ_CUT, YSYMM
** Name: Disp-BC-7 Type: Symmetry/Antisymmetry/Encastre
*Boundary
QUARTER-BATTERY-1.ZY_CUT, XSYMM
** Name: Disp-BC-8 Type: Symmetry/Antisymmetry/Encastre
*Boundary
TABLE-1.TABLE, ENCASTRE
** ----------------------------------------------------------------
**
** STEP: Step-1
**
*Step, name=Step-1, nlgeom=YES
Indentation Test
*Dynamic, Explicit
, 250.
*Bulk Viscosity
0.06, 1.2
** Mass Scaling: Semi-Automatic
**               Whole Model
*Fixed Mass Scaling, dt=0.05, type=below min
**
** BOUNDARY CONDITIONS
**
** Name: Disp-BC-9 Type: Displacement/Rotation
*Boundary, amplitude=SMOOTH_STEP
H5-1.INDENTER, 3, 3, -1.98
**
** INTERACTIONS
**
** Interaction: INT-1-1
*Contact Pair, interaction=INTPROP-1, mechanical constraint=KINEMATIC, cpset=INT-1-1
H5-1.H5-1-INDENTER, QUARTER-BATTERY-1.TOP
** Interaction: TABLECONTACT-1
*Contact Pair, interaction=INTPROP-1, mechanical constraint=KINEMATIC, cpset=TABLECONTACT-1
TABLE-1.TABLE-1-TABLETOP, QUARTER-BATTERY-1.BOTTOM
**
** OUTPUT REQUESTS
**
*Restart, write, number interval=1, time marks=NO
**
** FIELD OUTPUT: F-Output-1
**
*Output, field, variable=PRESELECT
**
** HISTORY OUTPUT: H-Output-2
**
*Output, history, time interval=1
*Element Output, elset=QUARTER-BATTERY-1.CONTACTELEMENTS
MISES, PEEQ, S11, S12, S13, S22, S23, S33
**
** HISTORY OUTPUT: H-Output-3
**
*Node Output, nset=QUARTER-BATTERY-1.CONTACTNODES
U1, U2, U3
**
** HISTORY OUTPUT: H-Output-4
**
*Node Output, nset=H5-1.INDENTER
RF3, U3
**
** HISTORY OUTPUT: H-Output-1
**
*Output, history, variable=PRESELECT, time interval=1
*End Step
