*Heading
** Job name: H_50_validation Model name: H_50_newmesh
** Generated by: Abaqus/CAE 2024
*Preprint, echo=NO, model=NO, history=NO, contact=NO
**
** PARTS
**
*Part, name=H_50-1
*End Part
**
*Part, name=QUARTER-BATTERY
*Node
      1,           0.,        20.75,   5.07000017
      2,   17.2999992,        20.75,   5.07000017
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*Element, type=C3D8R
    1,   188,  1572,  5860,  1166,     1,    19,   586,    96
    2,  1572,  1573,  5861,  5860,    19,    20,   587,   586
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*Nset, nset=XZ_CUT
    3,    4,    6,    7,   17,   18
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*Elset, elset=XZ_CUT
   320,   321,   322,   323,   324,   325
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*Nset, nset=ZY_CUT
    9,   10,   11,   12,   17,   18
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*Elset, elset=ZY_CUT
 2641, 2642, 2643, 2644, 2645, 2646
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*Elset, elset=CONTACTELEMENTS, generate
  8217,  15409,      8
*Nset, nset=CONTACTNODES
    2,    3,   10,   18,   29,   30
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*Elset, elset=_TOP_S2, internal, generate
   1,  330,    1
*Elset, elset=_TOP_S4, internal, generate
 2648,  8216,     8
*Elset, elset=_TOP_S6, internal, generate
  8217,  15409,      8
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*Elset, elset=QUARTER-BATTERY, generate
     1,  15416,      1
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*Elset, elset="_cutoff sides (symmetry)_S2", internal
 2641, 2642, 2643, 2644, 2645, 2646
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*Elset, elset="_cutoff sides (symmetry)_S5", internal
   320,   321,   322,   323,   324,   325
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*Elset, elset="_Edges (open)_S6", internal, generate
    1,  2630,    11
*Elset, elset="_Edges (open)_S5", internal
 2769, 2770, 2771, 2772, 2773, 2774
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*Elset, elset="_Edges (open)_S2", internal, generate
 6721,  6808,     1
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*Elset, elset=_TOP_S2_2, internal, generate
   1,  330,    1
*Elset, elset=_TOP_S4_2, internal, generate
 2648,  8216,     8
*Elset, elset=_TOP_S6_2, internal, generate
  8217,  15409,      8
*Surface, type=ELEMENT, name=TOP
_TOP_S2_2, S2
_TOP_S4_2, S4
_TOP_S6_2, S6
*Elset, elset="_cutoff sides (symmetry)_S2", internal
 2641, 2642, 2643, 2644, 2645, 2646
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*Elset, elset="_cutoff sides (symmetry)_S5", internal
   320,   321,   322,   323,   324,   325
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*Surface, type=ELEMENT, name="cutoff sides (symmetry)"
"_cutoff sides (symmetry)_S2", S2
"_cutoff sides (symmetry)_S5", S5
*Elset, elset="_Edges (open)_S6", internal, generate
    1,  2630,    11
*Elset, elset="_Edges (open)_S5", internal
 2769, 2770, 2771, 2772, 2773, 2774
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*Elset, elset="_Edges (open)_S2", internal, generate
 6721,  6808,     1
*Surface, type=ELEMENT, name="Edges (open)"
"_Edges (open)_S6", S6
"_Edges (open)_S5", S5
"_Edges (open)_S2", S2
*Elset, elset=_BOTTOM_S6_2, internal, generate
 2641,  8209,     8
*Elset, elset=_BOTTOM_S4_2, internal, generate
  8224,  15416,      8
*Elset, elset=_BOTTOM_S1_2, internal, generate
 2311,  2640,     1
*Surface, type=ELEMENT, name=BOTTOM
_BOTTOM_S6_2, S6
_BOTTOM_S4_2, S4
_BOTTOM_S1_2, S1
** Section: Section-1-QUARTER-BATTERY
*Solid Section, elset=QUARTER-BATTERY, material=BATTERY
,
*End Part
**
*Part, name=TABLE-1
*End Part
**
**
** ASSEMBLY
**
*Assembly, name=Assembly
**
*Instance, name=QUARTER-BATTERY-1, part=QUARTER-BATTERY
*End Instance
**
*Instance, name=TABLE-1, part=TABLE-1
2.64633920112373e-14,           0., -6.71537740641416e-22
2.64633920112373e-14,           0., -6.71537740641416e-22, 2.64633920112373e-14, -1.00000001268805, -6.71537740641416e-22, 89.9999992730282
*Node
      1,           0.,         67.5,           0.
*Nset, nset=TABLE-1-RefPt_, internal
 1,
*Nset, nset=TABLE-1-REFPT_, internal
 1,
*Nset, nset=TABLE
 1,
*Surface, type=CYLINDER, name=TABLE-1-TABLE-1-TABLE-1-TABLE-1-TABLETOP
START,           0.,         67.5
 LINE,           0.,        -32.5
*End Instance
**
*Instance, name=H_50-1, part=H_50-1
   29.299999,        32.75,        30.17
   29.299999,        32.75,        30.17, 30.2999990126881,        32.75,        30.17, 89.9999992730282
*Node
      1, 1.53080845e-15,         -25.,           0.
*Nset, nset=H_50-1-REFPT_, internal
 1,
*Nset, nset=H_50
 1,
*Surface, type=REVOLUTION, name=H_50-1-H_50-1-OUTSIDE
START,           0.,           0.
 LINE,          25.,           0.
 CIRCL,           0.,         -25.,           0.,           0.
*End Instance
**
*Nset, nset=BOTTOM, instance=QUARTER-BATTERY-1
    5,    6,    7,    8,    9,   12
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*Elset, elset=BOTTOM, instance=QUARTER-BATTERY-1
  1996,  1997,  1998,  1999,  2000,  2001
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*Nset, nset=_PICKEDSET13, internal, instance=H_50-1
 1,
*Nset, nset=_PICKEDSET17, internal, instance=H_50-1
 1,
*Nset, nset=_PickedSet14, internal, instance=H_50-1
 1,
** Constraint: RigidBody-1
*Rigid Body, ref node=_PickedSet14, analytical surface=H_50-1.H_50-1-H_50-1-OUTSIDE
** Constraint: RigidBody-2
*Rigid Body, ref node=TABLE-1.TABLE, analytical surface=TABLE-1.TABLE-1-TABLE-1-TABLE-1-TABLE-1-TABLETOP
*End Assembly
*Amplitude, name=EQUALLY_SPACED, time=TOTAL TIME, definition=EQUALLY SPACED, fixed interval=250.
             0.,              1.
*Amplitude, name=SMOOTH_STEP, time=TOTAL TIME, definition=SMOOTH STEP
             0.,              0.,            250.,              1.
**
** MATERIALS
**
**     Initial plastic behavior is for copper, to be determined
**
**
*Material, name=BATTERY
*Density
 5.83e-09,
*Elastic
4200., 0.1
*Plastic
100.,  0.
120., 0.1
200., 0.2
250., 0.3
270., 0.4
290., 0.5
300., 0.6
**
** INTERACTION PROPERTIES
**
*Surface Interaction, name=INTPROP-1
*Friction
 0.1,
*Surface Behavior, pressure-overclosure=HARD
**
** BOUNDARY CONDITIONS
**
** Name: Disp-BC-1 Type: Symmetry/Antisymmetry/Encastre
*Boundary
TABLE-1.TABLE, ENCASTRE
** Name: Disp-BC-2 Type: Symmetry/Antisymmetry/Encastre
*Boundary
QUARTER-BATTERY-1.XZ_CUT, YSYMM
** Name: Disp-BC-3 Type: Symmetry/Antisymmetry/Encastre
*Boundary
QUARTER-BATTERY-1.ZY_CUT, XSYMM
** ----------------------------------------------------------------
**
** STEP: Step-1
**
*Step, name=Step-1, nlgeom=YES
Indentation Test
*Dynamic, Explicit
, 250.
*Bulk Viscosity
0.06, 1.2
** Mass Scaling: Semi-Automatic
**               Whole Model
*Fixed Mass Scaling, dt=0.05, type=below min
**
** BOUNDARY CONDITIONS
**
** Name: Disp-BC-4 Type: Displacement/Rotation
*Boundary, amplitude=EQUALLY_SPACED
H_50-1.H_50, 1, 1
** Name: Disp-BC-5 Type: Displacement/Rotation
*Boundary, amplitude=EQUALLY_SPACED
H_50-1.H_50, 2, 2
** Name: Disp-BC-6 Type: Displacement/Rotation
*Boundary, amplitude=EQUALLY_SPACED
H_50-1.H_50, 3, 3, -2.11
** Name: Disp-BC-7 Type: Displacement/Rotation
*Boundary, amplitude=EQUALLY_SPACED
H_50-1.H_50, 4, 4
** Name: Disp-BC-8 Type: Displacement/Rotation
*Boundary, amplitude=EQUALLY_SPACED
H_50-1.H_50, 5, 5
** Name: Disp-BC-9 Type: Displacement/Rotation
*Boundary, amplitude=EQUALLY_SPACED
H_50-1.H_50, 6, 6
**
** INTERACTIONS
**
** Interaction: INT-1-1-1-1-1
*Contact Pair, interaction=INTPROP-1, mechanical constraint=KINEMATIC, cpset=INT-1-1-1-1-1
H_50-1.H_50-1-H_50-1-OUTSIDE, QUARTER-BATTERY-1.TOP
** Interaction: TABLECONTACT-1-1-1-1
*Contact Pair, interaction=INTPROP-1, mechanical constraint=KINEMATIC, cpset=TABLECONTACT-1-1-1-1
TABLE-1.TABLE-1-TABLE-1-TABLE-1-TABLE-1-TABLETOP, QUARTER-BATTERY-1.BOTTOM
**
** OUTPUT REQUESTS
**
*Restart, write, number interval=1, time marks=NO
**
** FIELD OUTPUT: F-Output-1
**
*Output, field, variable=PRESELECT
**
** HISTORY OUTPUT: H-Output-3
**
*Output, history, time interval=1.
*Node Output, nset=H_50-1.H_50
RF3, U3
**
** HISTORY OUTPUT: H-Output-4
**
*Output, history, variable=PRESELECT, time interval=1.
*End Step
